<?xml version="1.0" encoding="UTF-8"?>
<neuroml xmlns="http://www.neuroml.org/schema/neuroml2" xmlns:xsi="http://www.w3.org/2001/XMLSchema-instance" xsi:schemaLocation="http://www.neuroml.org/schema/neuroml2  https://raw.githubusercontent.com/NeuroML/NeuroML2/development/Schemas/NeuroML2/NeuroML_v2beta5.xsd" id="C51A_scaled_exp">

    <!-- soma -->
    <include href="na_s.channel.nml"/>
    <include href="kdr.channel.nml"/>
    <include href="k.channel.nml"/>
    <include href="cal.channel.nml"/>

    <!-- dend -->
    <include href="cah.channel.nml"/>
    <include href="kca.channel.nml"/>
    <include href="h.channel.nml"/>
    <include href="ca.nml"/>

    <!-- axon -->
    <include href="na_a.channel.nml"/>

    <!-- all  -->
    <include href="leak.channel.nml"/>

    <!--
    % Cell morphology
    % p1     = 0.25;        % Cell surface ratio soma/dendrite
    % p2     = 0.15;        % Cell surface ratio axon(hillock)/soma
    % g_int  = 0.13;        % Cell internal conductance

    Adend = ldend*pi*Rdendˆ2
    Asoma = lsoma*pi*Rsomaˆ2

    .25 = ldend*RDendˆ2 / lsoma*pi*Rsomaˆ2

    assume Rdend = 10;
    assume Rsoma = 20;
    assume lsoma = 20;
    assume ldend = 200
    4*1*ldend = lsoma*Rsomaˆ2
    4*1*ldend = 10*400

    assume lsoma = 20;
    ldend = 2250;

    Raxon = 20;
    .15 = laxon*20ˆ2 / 20*20ˆ2

    20 * .15 = laxon = 3;
    -->

    <cell id="C51A">

        <notes>Cell morphology generated by neuroConstruct from file: C51A_scaled_exp.swc</notes>

        <morphology id="morphology_C51A_scaled_exp">

            <segment id="0" name="Comp_1">
                <proximal x="100.0331" y="117.0343" z="64.0716" diameter="12.16"/>
                <distal x="100.51114" y="117.306" z="63.9753" diameter="11.305"/>
            </segment>

            <segment id="999999999" name="axon_1">
                <parent segment="0"/>
                <distal x="101.51114" y="118.306" z="64.9753" diameter="1"/>
            </segment>

            <segment id="1" name="Comp_3">
                <parent segment="0"/>
                <distal x="101.85672" y="117.24368" z="63.9144" diameter="10.64"/>
            </segment>

            <segment id="2" name="Comp_4">
                <parent segment="1"/>
                <distal x="102.6" y="116.66" z="63.9" diameter="9.12"/>
            </segment>

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
            <segmentGroup id="Soma" neuroLexId="sao864921383">    <!--
                This group contains an unbranched set of segments, and all of the segmentGroups marked with
                neuroLexId = sao864921383 form a non-overlapping set of all of the segments.
                These segmentGroups correspond to the 'cables' of NeuroML v1.8.1. -->

                <member segment="0"/>

                <member segment="1"/>

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            </segmentGroup>

            <segmentGroup id="ExtraSomaSec_Comp_171" neuroLexId="sao864921383">    <!--
                This group contains an unbranched set of segments, and all of the segmentGroups marked with
                neuroLexId = sao864921383 form a non-overlapping set of all of the segments.
                These segmentGroups correspond to the 'cables' of NeuroML v1.8.1. -->

                <member segment="11"/>

                <member segment="12"/>

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            </segmentGroup>

            <segmentGroup id="ExtraSomaSec_Comp_555" neuroLexId="sao864921383">    <!--
                This group contains an unbranched set of segments, and all of the segmentGroups marked with
                neuroLexId = sao864921383 form a non-overlapping set of all of the segments.
                These segmentGroups correspond to the 'cables' of NeuroML v1.8.1. -->

                <member segment="23"/>

                <member segment="24"/>

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            </segmentGroup>

            <segmentGroup id="ExtraSomaSec_Comp_968" neuroLexId="sao864921383">    <!--
                This group contains an unbranched set of segments, and all of the segmentGroups marked with
                neuroLexId = sao864921383 form a non-overlapping set of all of the segments.
                These segmentGroups correspond to the 'cables' of NeuroML v1.8.1. -->

                <member segment="32"/>

                <member segment="33"/>

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            </segmentGroup>

            <segmentGroup id="ExtraSomaSec_Comp_1177" neuroLexId="sao864921383">    <!--
                This group contains an unbranched set of segments, and all of the segmentGroups marked with
                neuroLexId = sao864921383 form a non-overlapping set of all of the segments.
                These segmentGroups correspond to the 'cables' of NeuroML v1.8.1. -->

                <member segment="48"/>

                <member segment="49"/>

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            </segmentGroup>

            <segmentGroup id="Sec_Comp_13" neuroLexId="sao864921383">    <!--
                This group contains an unbranched set of segments, and all of the segmentGroups marked with
                neuroLexId = sao864921383 form a non-overlapping set of all of the segments.
                These segmentGroups correspond to the 'cables' of NeuroML v1.8.1. -->

                <member segment="64"/>

                <member segment="65"/>

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            </segmentGroup>

            <segmentGroup id="Sec_Comp_183" neuroLexId="sao864921383">    <!--
                This group contains an unbranched set of segments, and all of the segmentGroups marked with
                neuroLexId = sao864921383 form a non-overlapping set of all of the segments.
                These segmentGroups correspond to the 'cables' of NeuroML v1.8.1. -->

                <member segment="222"/>

                <member segment="223"/>

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            </segmentGroup>

            <segmentGroup id="Sec_Comp_240" neuroLexId="sao864921383">    <!--
                This group contains an unbranched set of segments, and all of the segmentGroups marked with
                neuroLexId = sao864921383 form a non-overlapping set of all of the segments.
                These segmentGroups correspond to the 'cables' of NeuroML v1.8.1. -->

                <member segment="279"/>

                <member segment="280"/>

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            </segmentGroup>

            <segmentGroup id="Sec_Comp_384" neuroLexId="sao864921383">    <!--
                This group contains an unbranched set of segments, and all of the segmentGroups marked with
                neuroLexId = sao864921383 form a non-overlapping set of all of the segments.
                These segmentGroups correspond to the 'cables' of NeuroML v1.8.1. -->

                <member segment="423"/>

                <member segment="424"/>

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            </segmentGroup>

            <segmentGroup id="Sec_Comp_564" neuroLexId="sao864921383">    <!--
                This group contains an unbranched set of segments, and all of the segmentGroups marked with
                neuroLexId = sao864921383 form a non-overlapping set of all of the segments.
                These segmentGroups correspond to the 'cables' of NeuroML v1.8.1. -->

                <member segment="594"/>

                <member segment="595"/>

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            </segmentGroup>

            <segmentGroup id="Sec_Comp_602" neuroLexId="sao864921383">    <!--
                This group contains an unbranched set of segments, and all of the segmentGroups marked with
                neuroLexId = sao864921383 form a non-overlapping set of all of the segments.
                These segmentGroups correspond to the 'cables' of NeuroML v1.8.1. -->

                <member segment="632"/>

                <member segment="633"/>

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            </segmentGroup>

            <segmentGroup id="Sec_Comp_618" neuroLexId="sao864921383">    <!--
                This group contains an unbranched set of segments, and all of the segmentGroups marked with
                neuroLexId = sao864921383 form a non-overlapping set of all of the segments.
                These segmentGroups correspond to the 'cables' of NeuroML v1.8.1. -->

                <member segment="648"/>

                <member segment="649"/>

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            </segmentGroup>

            <segmentGroup id="Sec_Comp_834" neuroLexId="sao864921383">    <!--
                This group contains an unbranched set of segments, and all of the segmentGroups marked with
                neuroLexId = sao864921383 form a non-overlapping set of all of the segments.
                These segmentGroups correspond to the 'cables' of NeuroML v1.8.1. -->

                <member segment="864"/>

                <member segment="865"/>

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            </segmentGroup>

            <segmentGroup id="Sec_Comp_917" neuroLexId="sao864921383">    <!--
                This group contains an unbranched set of segments, and all of the segmentGroups marked with
                neuroLexId = sao864921383 form a non-overlapping set of all of the segments.
                These segmentGroups correspond to the 'cables' of NeuroML v1.8.1. -->

                <member segment="947"/>

                <member segment="948"/>

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            </segmentGroup>

            <segmentGroup id="Sec_Comp_984" neuroLexId="sao864921383">    <!--
                This group contains an unbranched set of segments, and all of the segmentGroups marked with
                neuroLexId = sao864921383 form a non-overlapping set of all of the segments.
                These segmentGroups correspond to the 'cables' of NeuroML v1.8.1. -->

                <member segment="998"/>

                <member segment="999"/>

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            </segmentGroup>

            <segmentGroup id="Sec_Comp_998" neuroLexId="sao864921383">    <!--
                This group contains an unbranched set of segments, and all of the segmentGroups marked with
                neuroLexId = sao864921383 form a non-overlapping set of all of the segments.
                These segmentGroups correspond to the 'cables' of NeuroML v1.8.1. -->

                <member segment="1012"/>

                <member segment="1013"/>

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            </segmentGroup>

            <segmentGroup id="Sec_Comp_1016" neuroLexId="sao864921383">    <!--
                This group contains an unbranched set of segments, and all of the segmentGroups marked with
                neuroLexId = sao864921383 form a non-overlapping set of all of the segments.
                These segmentGroups correspond to the 'cables' of NeuroML v1.8.1. -->

                <member segment="1030"/>

                <member segment="1031"/>

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            </segmentGroup>

            <segmentGroup id="Sec_Comp_1053" neuroLexId="sao864921383">    <!--
                This group contains an unbranched set of segments, and all of the segmentGroups marked with
                neuroLexId = sao864921383 form a non-overlapping set of all of the segments.
                These segmentGroups correspond to the 'cables' of NeuroML v1.8.1. -->

                <member segment="1067"/>

                <member segment="1068"/>

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            </segmentGroup>

            <segmentGroup id="Sec_Comp_1115" neuroLexId="sao864921383">    <!--
                This group contains an unbranched set of segments, and all of the segmentGroups marked with
                neuroLexId = sao864921383 form a non-overlapping set of all of the segments.
                These segmentGroups correspond to the 'cables' of NeuroML v1.8.1. -->

                <member segment="1129"/>

                <member segment="1130"/>

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            </segmentGroup>

            <segmentGroup id="Sec_Comp_1193" neuroLexId="sao864921383">    <!--
                This group contains an unbranched set of segments, and all of the segmentGroups marked with
                neuroLexId = sao864921383 form a non-overlapping set of all of the segments.
                These segmentGroups correspond to the 'cables' of NeuroML v1.8.1. -->

                <member segment="1191"/>

                <member segment="1192"/>

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            </segmentGroup>

            <segmentGroup id="axon_seg" neuroLexId="sao864921383">
                <member segment="999999999"/>
            </segmentGroup>

            <segmentGroup id="axon_group" neuroLexId="GO:0030424">    <!--Axon group-->
                <include segmentGroup="axon_seg"/>
            </segmentGroup>

            <segmentGroup id="all">
                <include segmentGroup="axon_group"/>
                <include segmentGroup="Soma"/>
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            </segmentGroup>

            <segmentGroup id="Colour_White">
                <include segmentGroup="Soma"/>
                <include segmentGroup="ExtraSomaSec_Comp_171"/>
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            </segmentGroup>

            <segmentGroup id="soma_group" neuroLexId="GO:0043025">    <!--Soma group-->

                <include segmentGroup="Soma"/>
            </segmentGroup>

            <segmentGroup id="dendrite_group" neuroLexId="GO:0030425">    <!--Dendrite group-->

                <include segmentGroup="ExtraSomaSec_Comp_171"/>
                <include segmentGroup="ExtraSomaSec_Comp_555"/>
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            </segmentGroup>

            <segmentGroup id="ExtraSomaSegments">
                <include segmentGroup="ExtraSomaSec_Comp_171"/>
                <include segmentGroup="ExtraSomaSec_Comp_555"/>
                <include segmentGroup="ExtraSomaSec_Comp_968"/>
                <include segmentGroup="ExtraSomaSec_Comp_1177"/>
            </segmentGroup>

            <segmentGroup id="Colour_Green">
                <include segmentGroup="Sec_Comp_13"/>
                <include segmentGroup="Sec_Comp_183"/>
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            </segmentGroup>

        </morphology>

        <biophysicalProperties id="biophys">

            <membraneProperties>
                <!-- soma -->
                <channelDensity condDensity="30 mS_per_cm2" id="na_s_soma" segmentGroup="soma_group" ionChannel="na_s" ion="na" erev="55 mV"/>
                <channelDensity condDensity="30 mS_per_cm2" id="kdr_soma" segmentGroup="soma_group"
                ionChannel="kdr" ion="k" erev="-75 mV"/>
                <channelDensity condDensity="15 mS_per_cm2" id="k_soma" segmentGroup="soma_group"
                ionChannel="k" ion="k" erev="-75 mV"/>
                <channelDensity condDensity="20 mS_per_cm2" id="cal_soma" segmentGroup="soma_group"
                ionChannel="cal" ion="cal" erev="120 mV"/>

                <!-- dendrite 10 35 25-->
                <channelDensity condDensity="10 mS_per_cm2" id="cah_dend" segmentGroup="dendrite_group" ionChannel="cah" ion="ca" erev="120 mV"/>
                <channelDensity condDensity="35 mS_per_cm2" id="kca_dend" segmentGroup="dendrite_group" ionChannel="kca" ion="k" erev="-75 mV"/>
                <channelDensity condDensity="25 mS_per_cm2" id="h_dend" segmentGroup="dendrite_group" ionChannel="h" ion="k" erev="-43 mV"/>

                <!-- axon -->
                <channelDensity condDensity="200 mS_per_cm2" id="na_axon" segmentGroup="axon_group" ionChannel="na_a" ion="na" erev="55 mV"/>
                <channelDensity condDensity="200 mS_per_cm2" id="k_axon" segmentGroup="axon_group" ionChannel="k" ion="k" erev="-75 mV"/>

                <channelDensity condDensity="1.3e-2 mS_per_cm2" id="leak_all" segmentGroup="all" ionChannel="leak" ion="_leak" erev="10 mV"/>

                <spikeThresh value="0 mV"/>
                <specificCapacitance value="1 uF_per_cm2"/>
                <initMembPotential value="-65.0 mV"/>

            </membraneProperties>

            <intracellularProperties>
                <species segmentGroup="dendrite_group" id="ca" ion="ca" concentrationModel="ca_conc" initialConcentration="3.7152 mM" initialExtConcentration="3.0mM"/>

                <resistivity value=".1 ohm_cm" segmentGroup="soma_group"/>
                <resistivity value=".1 ohm_cm" segmentGroup="dendrite_group"/>
                <resistivity value=".1 ohm_cm" segmentGroup="axon_group"/>
            </intracellularProperties>

        </biophysicalProperties>

    </cell>

</neuroml>
